B := 0.60^(1/3)
B = 0.843433
E := 164/(8*933.938)*[1.5*(81*B^-9 - 98*B^-7 + 25*B^-5) + 4/3*(49*B^-7 - 25*B^-5)] = [6.65744]
[164; 200.479; 245.494; 301.564; 372.138; 462.039; 578.138; 730.439; 933.938]
table  # each column defines a variable
    B | K
    1 | 5.5
    0.95 | 5.542
    0.90 | 5.612
    0.85 | 5.709
    0.80 | 5.833
    0.75 | 5.987
    0.70 | 6.172
    0.65 | 6.394
    0.60 | 6.657
end table
